variable number index 1
units lj
atom_style angle
boundary        s s s
neighbor 1.0 bin
neigh_modify every 1 delay 1 check yes
read_data temporary/initial.txt
pair_style  lj/cut 1.12246
pair_modify     shift yes
pair_coeff      * * 1.0 1.0 1.12246
bond_style harmonic
bond_coeff 1 100.0 1.1
 fix 1 all   nve
 fix 2 all  langevin   1.0 1.0   1.0  ${number}
thermo 1000
thermo_style   custom   step  temp  epair vol cpu
timestep 0.001
reset_timestep 0
angle_style cosine
angle_coeff 1 10
run 5000
bond_style fene
 bond_coeff 1 30.0 1.5 1.0 1.0
reset_timestep 0
angle_style cosine
angle_coeff 1 10
dump 2 all xyz 10 temporary/initial_seed${number}.xyz
dump_modify 2 element O
reset_timestep 0
run 0
